# OpenSim document version 40500
Model:
  Ground
  BodySet:
    Body calcn_l: mass=1.207906 [kg] mass_center=(0.1019826 0.03059477 0)
        inertia=(0.001407029 0.003919581 0.004120585 0 0 0) meshes=l_foot.vtp
    Body toes_l: mass=0.2093059 mass_center=(0.03528597 0.006118955 0.01784695)
        inertia=(0.0001005021 0.0002010042 0.001005021 0 0 0) meshes=l_bofoot.vtp
  JointSet:
    PinJoint mtp_l: socket_parent_frame=calcn_l_offset socket_child_frame=toes_l_offset
      Coordinate mtp_angle_l: default_value=-0.1738798 range=(-0.7853982 0.5235988) clamped=true
      PhysicalOffsetFrame calcn_l_offset: socket_parent=/bodyset/calcn_l
          translation=(0.1823449 -0.002039652 -0.001101412) [meters] orientation=(-3.14159 -0.619901 0) [radians]
      PhysicalOffsetFrame toes_l_offset: socket_parent=/bodyset/toes_l translation=(0 0 0)
          orientation=(-3.14159 -0.619901 0)
    CustomJoint ground_hindfoot: socket_parent_frame=/ground socket_child_frame=/bodyset/calcn_l
      Coordinate Rotation1
      Coordinate Rotation2
      Coordinate Rotation3
      Coordinate Translation1
      Coordinate Translation2: default_value=0.02210758
      Coordinate Translation3
      SpatialTransform:
        TransformAxis rotation1: coordinates=Rotation1 axis=(0 -1 0) LinearFunction(coefficients=1 0)
        TransformAxis rotation2: coordinates=Rotation2 axis=(-1 0 0) LinearFunction(coefficients=1 0)
        TransformAxis rotation3: coordinates=Rotation3 axis=(0 0 1) LinearFunction(coefficients=1 0)
        TransformAxis translation1: coordinates=Translation1 axis=(1 0 0) LinearFunction(coefficients=1 0)
        TransformAxis translation2: coordinates=Translation2 axis=(0 1 0) LinearFunction(coefficients=1 0)
        TransformAxis translation3: coordinates=Translation3 axis=(0 0 1) LinearFunction(coefficients=1 0)
  MarkerSet:
    Marker L_Heel: calcn_l (-0.02847321 0.01598104 0.007929418)
    Marker L_Toe: toes_l (0.08883155 0.005627975 -0.004654897)
    Marker L_Toe_Lateral: calcn_l (0.1718647 -0.004850309 -0.07156501)
    Marker L_Toe_Medial: calcn_l (0.1932259 0.0004547029 0.055876)
    Marker L_Midfoot_Superior: calcn_l (0.1434861 0.06633682 -0.007249701)
    Marker L_Midfoot_Lateral: calcn_l (0.07424542 0.002133244 -0.05691)
    Marker spring_marker_1: calcn_l (0.1437263 -0.02210758 0.04412781)
    Marker spring_marker_2: calcn_l (0.1862816 -0.02210758 0.04218421)
    Marker spring_marker_3: toes_l (0.04649195 -0.02210758 0.04134202)
    Marker spring_marker_4: calcn_l (0.01411166 -0.02210758 0.007284904)
    Marker spring_marker_5: calcn_l (0.05666689 -0.02210758 0.005341304)
    Marker spring_marker_6: calcn_l (0.09922211 -0.02210758 0.003397703)
    Marker spring_marker_7: calcn_l (0.1417773 -0.02210758 0.001454102)
    Marker spring_marker_8: toes_l (0.00198771 -0.02210758 0.0006119133)
    Marker spring_marker_9: toes_l (0.04454293 -0.02210758 -0.001331687)
    Marker spring_marker_10: calcn_l (0.01216265 -0.02210758 -0.0353888)
    Marker spring_marker_11: calcn_l (0.05471787 -0.02210758 -0.0373324)
    Marker spring_marker_12: calcn_l (0.0972731 -0.02210758 -0.039276)
    Marker spring_marker_13: calcn_l (0.1398283 -0.02210758 -0.0412196)
    Marker spring_marker_14: toes_l (3.869762e-5 -0.02210758 -0.04206179)
    Marker spring_marker_15: toes_l (0.04259392 -0.02210758 -0.04400539)
