# OpenSim document version 40500
AnalyzeTool RCNL_Fullbody_Model_Scaled:
  model_file: ../Step 1 - JMP/KickingModel_JMP.osim
  replace_force_set: false
  results_directory: surrogateData/MAData/drive_kick1
  output_precision: 8
  initial_time: 0.001
  final_time: 1.575
  solve_for_equilibrium_for_auxiliary_states: false
  maximum_number_of_integrator_steps: 20000
  maximum_integrator_step_size: 1
  minimum_integrator_step_size: 1e-8
  integrator_error_tolerance: 1e-5
  coordinates_file: surrogateData/IKData/drive_kick1.sto
  lowpass_cutoff_frequency_for_coordinates: -1
  AnalysisSet Analyses:
    MuscleAnalysis: start_time=0.001 end_time=1.575 step_interval=1 in_degrees=true muscle_list=all
        moment_arm_coordinate_list=all compute_moments=true
